// SBML level 3 version 1

model main()
  // model units - substance: mole, time: second, extent: mole

  // Compartments:
  compartment c1 = 1 litre;
  compartment comp = 1 litre;

  // Species:
  species S in comp = 100/comp;
  species Q in comp = 0;

  // Parameters:
  r0 = 0.01396648 per_second;
  r1 = 0.0349162 per_second;

  // Reactions:
  S_SandQ: S => S + Q; r0*S;
    S_SandQ_shape_param = 0.1; S_SandQ_distribution_index = 4; S_SandQ_transfer_identity = 0;
  Q_S: Q => S; r1*Q;
    Q_S_shape_param = 100; Q_S_distribution_index = 3; Q_S_transfer_identity = 0;

  // Unit definitions:
  unit per_second = 1 / second;
end
