// SBML level 3 version 1

model main()
  // model units - substance: mole, time: second, extent: mole

  // Compartments:
  compartment c1 = 1 litre;
  compartment comp = 1 litre;

  // Species:
  species ESC in comp = 100/comp;
  species EPI in comp = 0;
  species NPC in comp = 0;

  // Parameters:
  r0 = 0.0339 per_second;
  r1 = 0.0164 per_second;

  // Reactions:
  Differentiation_ESC_EPI: ESC => EPI; r0*ESC;
    Differentiation_ESC_EPI_shape_param = 27.6; Differentiation_ESC_EPI_distribution_index = 3; Differentiation_ESC_EPI_transfer_identity = 0;
  Differentiation_EPI_NPC: EPI => NPC; r1*EPI;
    Differentiation_EPI_NPC_shape_param = 39.29; Differentiation_EPI_NPC_distribution_index = 3; Differentiation_EPI_NPC_transfer_identity = 0;

  // Unit definitions:
  unit per_second = 1 / second;
end
